# Simple Filter Cake Structure Simulation


# Setting the varialbe for the simulation


#################################### System Geometry Section #####################################################
# geometry parameter

variable DEM_domain_half_width equal 171
variable DEM_domain_height equal 1710
variable DEM_domain_depth equal 1368

variable DEM_insertion_half_width equal 171
variable DEM_insertion_top equal 684
variable DEM_insertion_bottom equal 0

variable DEM_sample_half_width equal 171
variable DEM_sample_top equal 342
variable DEM_sample_bottom equal 0

variable DEM_zwall equal 0.00
variable DEM_particle_number equal 2000

############################## Particle Properties and DEM parameters #############################################
# particle physical property

variable DEM_density equal 1.18
variable DEM_youngsModulus equal 5000
variable DEM_poissonRatio equal 0.2
variable DEM_coefficientRestitution equal 0.3
variable DEM_coefficientFriction equal 0
variable DEM_k_finnie equal 1
variable DEM_cohesionEnergyDensity equal 50


# DEM simulation setting


variable DEM_particle_velocity equal 0.01
variable DEM_size_of_time_step equal 0.1
variable DEM_number_of_time_step equal 150000
variable DEM_cutoff equal 10.00


variable DEM_thermo_step equal 1000
variable DEM_dump_step equal 10000
variable DEM_print_step equal 10000
variable DEM_gravity equal 9.81e-6

####################################################################################################################

# initialize the simulation

units micro

newton off

boundary p p f

atom_style granular

atom_modify map array

communicate single vel yes

pair_style gran model hertz tangential history cohesion sjkr


# define the system domain and sample region
region domain block -${DEM_domain_half_width} ${DEM_domain_half_width} -${DEM_domain_half_width} ${DEM_domain_half_width} -${DEM_domain_depth} ${DEM_domain_height} units box
region sample block -${DEM_sample_half_width} ${DEM_sample_half_width} -${DEM_sample_half_width} ${DEM_sample_half_width} ${DEM_sample_bottom} ${DEM_sample_top} units box
create_box 1 domain


# difine the insertion region
region bc block -${DEM_insertion_half_width} ${DEM_insertion_half_width} -${DEM_insertion_half_width} ${DEM_insertion_half_width} ${DEM_insertion_bottom} ${DEM_insertion_top}


# define the wall, insertion face and particle
fix granwalls all wall/gran model hertz tangential history cohesion sjkr primitive type 1 zplane ${DEM_zwall}


########################################### Particle Template Section ########################################################

# define the size distribution of the particle

fix pts1 all particletemplate/sphere 10007 atom_type 1 density constant ${DEM_density} radius constant 25.0

fix pts2 all particletemplate/sphere 10009 atom_type 1 density constant ${DEM_density} radius constant 10.0

fix pdd all particledistribution/discrete/massbased 32452843 2 pts1 0.75 pts2 0.25

##############################################################################################################################

# define the insertion condition
group nve_group region domain

fix ins nve_group insert/pack seed 98887 distributiontemplate pdd vel constant 0. 0. -${DEM_particle_velocity} insert_every once overlapcheck yes all_in yes particles_in_region ${DEM_particle_number} region bc


# define the particle property
fix m1 all property/global youngsModulus peratomtype ${DEM_youngsModulus}

fix m2 all property/global poissonsRatio peratomtype ${DEM_poissonRatio}

fix m3 all property/global coefficientRestitution peratomtypepair 1 ${DEM_coefficientRestitution}

fix m4 all property/global coefficientFriction peratomtypepair 1 ${DEM_coefficientFriction}

fix m5 all property/global k_finnie peratomtypepair 1 ${DEM_k_finnie}

fix m6 all property/global cohesionEnergyDensity peratomtypepair 1 ${DEM_cohesionEnergyDensity}


# define the simulation setting

fix gravi all gravity ${DEM_gravity} vector 0.0 0.0 -1.0

neighbor ${DEM_cutoff} bin

neigh_modify delay 0

timestep ${DEM_size_of_time_step}

pair_coeff * *


# set the process monitor parameter

fix integr nve_group nve/sphere

compute 1 all erotate/sphere

thermo ${DEM_thermo_step}

thermo_style custom step atoms

thermo_modify lost ignore norm no


# set the vtk output parameter

run 1

dump dmp all custom/vtk ${DEM_dump_step} Result/vtk_file/particle_*.vtk id type x y z ix iy iz vx vy vz fx fy fz omegax omegay omegaz radius


# set the porosity output parameter

variable DEM_step equal step

variable DEM_sample_mass equal mass(all,sample)

variable DEM_sample_porosity equal 1-v_DEM_sample_mass/(v_DEM_sample_top-v_DEM_sample_bottom)/(2*v_DEM_sample_half_width)/(2*v_DEM_sample_half_width)/v_DEM_density

variable DEM_sample_number equal count(all,sample)

variable DEM_domain_number equal count(all,domain)


fix output all print ${DEM_print_step} "${DEM_step},${DEM_sample_porosity},${DEM_sample_number},${DEM_domain_number}" screen no file ./Result/DEM_porosity.csv


# run the simulation

run ${DEM_number_of_time_step} upto

unfix ins
